<?xml version="1.0"?>
<?xml-stylesheet type="text/xsl" href="http://jsbsim.sourceforge.net/JSBSim.xsl"?>
<fdm_config name="XB-70-jsbsim" version="2.0" release="ALPHA"
   xmlns:xsi="http://www.w3.org/2001/XMLSchema-instance"
   xsi:noNamespaceSchemaLocation="http://jsbsim.sourceforge.net/JSBSim.xsd">

 <fileheader>
  <author> Aeromatic v 0.95 </author>
  <filecreationdate> 2011-10-22 </filecreationdate>
  <version>$Revision: 1.10 $</version>
  <description> Models a XB-70. </description>
 </fileheader>

 <metrics>
   <wingarea  unit="FT2"> 6297.53 </wingarea>
   <wingspan  unit="FT" >  104.99 </wingspan>
   <wing_incidence>          2.00 </wing_incidence>
   <chord     unit="FT" >   59.98 </chord>
   <htailarea unit="FT2"> 1259.51 </htailarea>
   <htailarm  unit="FT" >   75.59 </htailarm>
   <vtailarea unit="FT2"> 1133.55 </vtailarea>
   <vtailarm  unit="FT" >   75.59 </vtailarm>
   <location name="AERORP" unit="IN">
     <x> 1360.70 </x>
     <y>   0.00 </y>
     <z>   0.00 </z>
   </location>
   <location name="EYEPOINT" unit="IN">
     <x> 453.57 </x>
     <y>   0.00 </y>
     <z>  38.00 </z>
   </location>
   <location name="VRP" unit="IN">
     <x>0</x>
     <y>0</y>
     <z>-185</z>
   </location>
 </metrics>

 <mass_balance>
   <ixx unit="SLUG*FT2">   2380633 </ixx>
   <iyy unit="SLUG*FT2">  10602280 </iyy>
   <izz unit="SLUG*FT2">   9326532 </izz>
   <emptywt unit="LBS" >    253600 </emptywt>
   <location name="CG" unit="IN">
     <x> 1360.70 </x>
     <y>   0.00 </y>
     <z> -56.70 </z>
   </location>
 </mass_balance>

 <ground_reactions>

  <contact type="BOGEY" name="NOSE">
   <location unit="IN">
     <x> 294.82 </x>
     <y>   0.00 </y>
     <z> -272.14 </z>
   </location>
   <static_friction>  0.80 </static_friction>
   <dynamic_friction> 0.50 </dynamic_friction>
   <rolling_friction> 0.02 </rolling_friction>
   <spring_coeff unit="LBS/FT">      065375.00 </spring_coeff>
   <damping_coeff unit="LBS/FT/SEC"> 15125.00 </damping_coeff>
   <max_steer unit="DEG"> 45.00 </max_steer>
   <brake_group>NONE</brake_group>
   <retractable>1</retractable>
 </contact>

  <contact type="BOGEY" name="LEFT_MAIN">
   <location unit="IN">
     <x> 1415.12 </x>
     <y> -113.39 </y>
     <z> -272.14 </z>
   </location>
   <static_friction>  0.80 </static_friction>
   <dynamic_friction> 0.50 </dynamic_friction>
   <rolling_friction> 0.02 </rolling_friction>
   <spring_coeff unit="LBS/FT">      271250.00 </spring_coeff>
   <damping_coeff unit="LBS/FT/SEC"> 40250.00 </damping_coeff>
   <max_steer unit="DEG">0</max_steer>
   <brake_group>LEFT</brake_group>
   <retractable>1</retractable>
 </contact>

  <contact type="BOGEY" name="RIGHT_MAIN">
   <location unit="IN">
     <x> 1415.12 </x>
     <y> 113.39 </y>
     <z> -272.14 </z>
   </location>
   <static_friction>  0.80 </static_friction>
   <dynamic_friction> 0.50 </dynamic_friction>
   <rolling_friction> 0.02 </rolling_friction>
   <spring_coeff unit="LBS/FT">      271250.00 </spring_coeff>
   <damping_coeff unit="LBS/FT/SEC"> 40250.00 </damping_coeff>
   <max_steer unit="DEG">0</max_steer>
   <brake_group>RIGHT</brake_group>
   <retractable>1</retractable>
 </contact>

  <contact type="STRUCTURE" name="LEFT_WING">
    <location unit="IN">
     <x> 1360.70 </x>
     <y> -52.50 </y>
     <z> -56.70 </z>
    </location>
    <static_friction>  0.80 </static_friction>
    <dynamic_friction> 0.50 </dynamic_friction>
    <spring_coeff unit="LBS/FT">      551250.00 </spring_coeff>
    <damping_coeff unit="LBS/FT/SEC"> 110250.00 </damping_coeff>
 </contact>

  <contact type="STRUCTURE" name="RIGHT_WING">
    <location unit="IN">
     <x> 1360.70 </x>
     <y>  52.50 </y>
     <z> -56.70 </z>
    </location>
    <static_friction>  0.80 </static_friction>
    <dynamic_friction> 0.50 </dynamic_friction>
    <spring_coeff unit="LBS/FT">      551250.00 </spring_coeff>
    <damping_coeff unit="LBS/FT/SEC"> 110250.00 </damping_coeff>
 </contact>

 </ground_reactions>

 <propulsion>

   <engine file="YJ93-GE-3">
    <location unit="IN">
      <x> 2207.83 </x>
      <y>  320.00 </y>
      <z>   0.00 </z>
    </location>
    <orient unit="DEG">
      <pitch> 0.00 </pitch>
      <roll>   0.00 </roll>
      <yaw>   0.00 </yaw>
    </orient>
    <feed>0</feed>
    <feed>1</feed>
    <feed>2</feed>
    <feed>3</feed>
    <feed>4</feed>
    <feed>5</feed>
    <feed>6</feed>
    <thruster file="direct">
     <location unit="IN">
       <x> 2207.83 </x>
       <y>  320.00 </y>
       <z>   0.00 </z>
     </location>
     <orient unit="DEG">
       <pitch> 0.00 </pitch>
       <roll>   0.00 </roll>
       <yaw>   0.00 </yaw>
     </orient>
    </thruster>
  </engine>

   <engine file="YJ93-GE-3">
    <location unit="IN">
      <x> 2207.83 </x>
      <y>  220.00 </y>
      <z>   0.00 </z>
    </location>
    <orient unit="DEG">
      <pitch> 0.00 </pitch>
      <roll>   0.00 </roll>
      <yaw>   0.00 </yaw>
    </orient>
    <feed>0</feed>
    <feed>1</feed>
    <feed>2</feed>
    <feed>3</feed>
    <feed>4</feed>
    <feed>5</feed>
    <feed>6</feed>
    <thruster file="direct">
     <location unit="IN">
       <x> 2207.83 </x>
       <y>  220.00 </y>
       <z>   0.00 </z>
     </location>
     <orient unit="DEG">
       <pitch> 0.00 </pitch>
       <roll>   0.00 </roll>
       <yaw>   0.00 </yaw>
     </orient>
    </thruster>
  </engine>

   <engine file="YJ93-GE-3">
    <location unit="IN">
      <x> 2207.83 </x>
      <y>  120.00 </y>
      <z>   0.00 </z>
    </location>
    <orient unit="DEG">
      <pitch> 0.00 </pitch>
      <roll>   0.00 </roll>
      <yaw>   0.00 </yaw>
    </orient>
    <feed>0</feed>
    <feed>1</feed>
    <feed>2</feed>
    <feed>3</feed>
    <feed>4</feed>
    <feed>5</feed>
    <feed>6</feed>
    <thruster file="direct">
     <location unit="IN">
       <x> 2207.83 </x>
       <y>  120.00 </y>
       <z>   0.00 </z>
     </location>
     <orient unit="DEG">
       <pitch> 0.00 </pitch>
       <roll>   0.00 </roll>
       <yaw>   0.00 </yaw>
     </orient>
    </thruster>
  </engine>

   <engine file="YJ93-GE-3">
    <location unit="IN">
      <x> 2207.83 </x>
      <y> -120.00 </y>
      <z>   0.00 </z>
    </location>
    <orient unit="DEG">
      <pitch> 0.00 </pitch>
      <roll>   0.00 </roll>
      <yaw>   0.00 </yaw>
    </orient>
    <feed>0</feed>
    <feed>1</feed>
    <feed>2</feed>
    <feed>3</feed>
    <feed>4</feed>
    <feed>5</feed>
    <feed>6</feed>
    <thruster file="direct">
     <location unit="IN">
       <x> 2207.83 </x>
       <y> -120.00 </y>
       <z>   0.00 </z>
     </location>
     <orient unit="DEG">
       <pitch> 0.00 </pitch>
       <roll>   0.00 </roll>
       <yaw>   0.00 </yaw>
     </orient>
    </thruster>
  </engine>

   <engine file="YJ93-GE-3">
    <location unit="IN">
      <x> 2207.83 </x>
      <y> -220.00 </y>
      <z>   0.00 </z>
    </location>
    <orient unit="DEG">
      <pitch> 0.00 </pitch>
      <roll>   0.00 </roll>
      <yaw>   0.00 </yaw>
    </orient>
    <feed>0</feed>
    <feed>1</feed>
    <feed>2</feed>
    <feed>3</feed>
    <feed>4</feed>
    <feed>5</feed>
    <feed>6</feed>
    <thruster file="direct">
     <location unit="IN">
       <x> 2207.83 </x>
       <y> -220.00 </y>
       <z>   0.00 </z>
     </location>
     <orient unit="DEG">
       <pitch> 0.00 </pitch>
       <roll>   0.00 </roll>
       <yaw>   0.00 </yaw>
     </orient>
    </thruster>
  </engine>

   <engine file="YJ93-GE-3">
    <location unit="IN">
      <x> 2207.83 </x>
      <y> -320.00 </y>
      <z>   0.00 </z>
    </location>
    <orient unit="DEG">
      <pitch> 0.00 </pitch>
      <roll>   0.00 </roll>
      <yaw>   0.00 </yaw>
    </orient>
    <feed>0</feed>
    <feed>1</feed>
    <feed>2</feed>
    <feed>3</feed>
    <feed>4</feed>
    <feed>5</feed>
    <feed>6</feed>
    <thruster file="direct">
     <location unit="IN">
       <x> 2207.83 </x>
       <y> -320.00 </y>
       <z>   0.00 </z>
     </location>
     <orient unit="DEG">
       <pitch> 0.00 </pitch>
       <roll>   0.00 </roll>
       <yaw>   0.00 </yaw>
     </orient>
    </thruster>
  </engine>

  <tank type="FUEL" number="0">
     <location unit="IN">
       <x> 400.70 </x>
       <y>   0.00 </y>
       <z> -56.70 </z>
     </location>
     <capacity unit="LBS"> 42857.00 </capacity>
     <contents unit="LBS"> 42857.00 </contents>
  </tank>

  <tank type="FUEL" number="1">
     <location unit="IN">
       <x> 1400.70 </x>
       <y>   0.00 </y>
       <z> -56.70 </z>
     </location>
     <capacity unit="LBS"> 42857.00 </capacity>
     <contents unit="LBS"> 42857.00 </contents>
  </tank>

  <tank type="FUEL" number="2">
     <location unit="IN">
       <x> 2400.70 </x>
       <y>   0.00 </y>
       <z> -56.70 </z>
     </location>
     <capacity unit="LBS"> 42857.00 </capacity>
     <contents unit="LBS"> 42857.00 </contents>
  </tank>

  <tank type="FUEL" number="3">
     <location unit="IN">
       <x> 1400.70 </x>
       <y> 100.00 </y>
       <z> -56.70 </z>
     </location>
     <capacity unit="LBS"> 42857.00 </capacity>
     <contents unit="LBS"> 42857.00 </contents>
  </tank>

  <tank type="FUEL" number="4">
     <location unit="IN">
       <x> 1400.70 </x>
       <y> -100.00 </y>
       <z> -56.70 </z>
     </location>
     <capacity unit="LBS"> 42857.00 </capacity>
     <contents unit="LBS"> 42857.00 </contents>
  </tank>

  <tank type="FUEL" number="5">
     <location unit="IN">
       <x> 1400.70 </x>
       <y> 200.00 </y>
       <z> -56.70 </z>
     </location>
     <capacity unit="LBS"> 42857.00 </capacity>
     <contents unit="LBS"> 42857.00 </contents>
  </tank>

  <tank type="FUEL" number="6">
     <location unit="IN">
       <x> 1400.70 </x>
       <y> -200.00 </y>
       <z> -56.70 </z>
     </location>
     <capacity unit="LBS"> 42857.00 </capacity>
     <contents unit="LBS"> 42857.00 </contents>
  </tank>

 </propulsion>

 <flight_control name="FCS: XB-70-jsbsim">

  <channel name="Pitch">
   <summer name="Pitch Trim Sum">
      <input>fcs/elevator-cmd-norm</input>
      <input>fcs/pitch-trim-cmd-norm</input>
      <clipto>
        <min> -1 </min>
        <max>  1 </max>
      </clipto>
   </summer>

   <aerosurface_scale name="Elevator Control">
      <input>fcs/pitch-trim-sum</input>
      <range>
        <min> -0.35 </min>
        <max>  0.35 </max>
      </range>
<output>fcs/elevator-pos-rad</output>
   </aerosurface_scale>

<lag_filter name="Elevator position filtered">
<input>fcs/elevator-control</input>
<c1>2</c1>
<clipto>
<min>-0.35</min>
<max>0.35</max>
</clipto>
<output>fcs/elevator-pos-rad</output>
</lag_filter>

   <aerosurface_scale name="elevator normalization">
      <input>fcs/elevator-pos-rad</input>
      <domain>
        <min> -0.35 </min>
        <max>  0.35 </max>
      </domain>
      <range>
        <min> -1 </min>
        <max>  1 </max>
      </range>
      <output>fcs/elevator-pos-norm</output>
   </aerosurface_scale>

  </channel>

  <channel name="Roll">
   <summer name="Roll Trim Sum">
      <input>fcs/aileron-cmd-norm</input>
      <input>fcs/roll-trim-cmd-norm</input>
      <clipto>
        <min> -1 </min>
        <max>  1 </max>
      </clipto>
   </summer>

<lag_filter name="Aileron position filtered">
<input>fcs/roll-trim-sum</input>
<c1>2</c1>
<clipto>
<min>-0.35</min>
<max>0.35</max>
</clipto>
<output>fcs/roll-trim-sum-filtered</output>
</lag_filter>

   <aerosurface_scale name="Left Aileron Control">
      <input>fcs/roll-trim-sum-filtered</input>
      <range>
        <min> -0.35 </min>
        <max>  0.35 </max>
      </range>
      <output>fcs/left-aileron-pos-rad</output>
   </aerosurface_scale>

   <aerosurface_scale name="Right Aileron Control">
      <input>-fcs/roll-trim-sum-filtered</input>
      <range>
        <min> -0.35 </min>
        <max>  0.35 </max>
      </range>
      <output>fcs/right-aileron-pos-rad</output>
   </aerosurface_scale>

   <aerosurface_scale name="left aileron normalization">
      <input>fcs/left-aileron-pos-rad</input>
      <domain>
        <min> -0.35 </min>
        <max>  0.35 </max>
      </domain>
      <range>
        <min> -1 </min>
        <max>  1 </max>
      </range>
      <output>fcs/left-aileron-pos-norm</output>
   </aerosurface_scale>

   <aerosurface_scale name="right aileron normalization">
      <input>fcs/right-aileron-pos-rad</input>
      <domain>
        <min> -0.35 </min>
        <max>  0.35 </max>
      </domain>
      <range>
        <min> -1 </min>
        <max>  1 </max>
      </range>
      <output>fcs/right-aileron-pos-norm</output>
   </aerosurface_scale>

  </channel>

   <channel name="Yaw">
   <summer name="Rudder Command Sum">
      <input>fcs/rudder-cmd-norm</input>
      <input>fcs/yaw-trim-cmd-norm</input>
      <clipto>
        <min> -0.35 </min>
        <max>  0.35 </max>
      </clipto>
   </summer>

   <scheduled_gain name="Yaw Damper Rate">
      <input>velocities/r-aero-rad_sec</input>
      <table>
        <independentVar lookup="row">velocities/ve-kts</independentVar>
         <tableData>
            30     0.00
            60     2.00
         </tableData>
      </table>
   </scheduled_gain>

   <scheduled_gain name="Yaw Damper Beta">
      <input>aero/beta-rad</input>
      <table>
        <independentVar lookup="row">velocities/ve-kts</independentVar>
        <tableData>
           30     0.00
           60     0.00
        </tableData>
      </table>
   </scheduled_gain>

   <summer name="Yaw Damper Sum">
      <input>fcs/yaw-damper-beta</input>
      <input>fcs/yaw-damper-rate</input>
      <clipto>
        <min> -0.1 </min>
        <max>  0.1 </max>
      </clipto>
   </summer>

   <scheduled_gain name="Yaw Damper Final">
      <input>fcs/yaw-damper-sum</input>
      <table>
        <independentVar lookup="row">velocities/ve-kts</independentVar>
        <tableData>
           30         0.0
           31         1.0
        </tableData>
      </table>
   </scheduled_gain>

   <summer name="Rudder Sum">
      <input>fcs/rudder-command-sum</input>
      <input>fcs/yaw-damper-final</input>
      <clipto>
        <min> -1 </min>
        <max>  1 </max>
      </clipto>
   </summer>

   <aerosurface_scale name="Rudder Control">
      <input>fcs/rudder-sum</input>
      <range>
        <min> -0.35 </min>
        <max>  0.35 </max>
      </range>
   </aerosurface_scale>

<lag_filter name="Rudder position filtered">
<input>fcs/rudder-control</input>
<c1>2</c1>
<clipto>
<min>-0.35</min>
<max>0.35</max>
</clipto>
<output>fcs/rudder-pos-rad</output>
</lag_filter>

   <aerosurface_scale name="rudder normalization">
      <input>-fcs/rudder-pos-rad</input>
      <domain>
        <min> -0.35 </min>
        <max>  0.35 </max>
      </domain>
      <range>
        <min> -1 </min>
        <max>  1 </max>
      </range>
      <output>fcs/rudder-pos-norm</output>
   </aerosurface_scale>

  </channel>

  <channel name="Flaps">
   <kinematic name="Flaps Control">
     <input>fcs/flap-cmd-norm</input>
     <traverse>
       <setting>
          <position>  0 </position>
          <time>      0 </time>
       </setting>
       <setting>
          <position> 20 </position>
          <time>     10 </time>
       </setting>
     </traverse>
     <output>fcs/flap-pos-deg</output>
   </kinematic>

   <aerosurface_scale name="flap normalization">
      <input>fcs/flap-pos-deg</input>
      <domain>
        <min>  0 </min>
        <max> 20 </max>
      </domain>
      <range>
        <min> 0 </min>
        <max> 1 </max>
      </range>
      <output>fcs/flap-pos-norm</output>
   </aerosurface_scale>

  </channel>

  <channel name="Landing Gear">
   <kinematic name="Gear Control">
     <input>gear/gear-cmd-norm</input>
     <traverse>
       <setting>
          <position> 0 </position>
          <time>     0 </time>
       </setting>
       <setting>
          <position> 1 </position>
          <time>    20 </time>
       </setting>
     </traverse>
     <output>gear/gear-pos-norm</output>
   </kinematic>

  </channel>

  <channel name="Speedbrake">
   <kinematic name="Speedbrake Control">
     <input>fcs/speedbrake-cmd-norm</input>
     <traverse>
       <setting>
          <position> 0 </position>
          <time>     0 </time>
       </setting>
       <setting>
          <position> 1 </position>
          <time>     1 </time>
       </setting>
     </traverse>
     <output>fcs/speedbrake-pos-norm</output>
   </kinematic>
  </channel>

  <channel name="Wing Fold">

        <kinematic name="Wing Control">
            <input>fcs/wing-fold-cmd-norm</input>
            <traverse>
                <setting>
                    <position>0.0000</position>
                    <time>0.0000</time>
                </setting>
                <setting>
                    <position>0.3850</position>
                    <time>25.0000</time>
                </setting>
                <setting>
                    <position>1.0000</position>
                    <time>65.0000</time>
                </setting>
            </traverse>
            <output>fcs/wing-fold-pos-norm</output>
        </kinematic>

  </channel>

 </flight_control>

 <aerodynamics>

         <function name="aero/function/kCDge">
            <description>Change_in_drag_due_to_ground_effect</description>
            <product>
                  <table>
                      <independentVar>aero/h_b-mac-ft</independentVar>
                      <tableData>
                          0.0000	0.0480
                          0.1000	0.5150
                          0.1500	0.6290
                          0.2000	0.7090
                          0.3000	0.8150
                          0.4000	0.8820
                          0.5000	0.9280
                          0.6000	0.9620
                          0.7000	0.9880
                          0.8000	1.0000
                      </tableData>
                  </table>
            </product>
        </function>

        <function name="aero/function/kCLge">
            <description>Change_in_lift_due_to_ground_effect</description>
            <product>
                  <table>
                      <independentVar>aero/h_b-mac-ft</independentVar>
                      <tableData>
                          0.0000	1.2030
                          0.1000	1.1270
                          0.1500	1.0900
                          0.2000	1.0730
                          0.3000	1.0460
                          0.4000	1.0550
                          0.5000	1.0190
                          0.6000	1.0130
                          0.7000	1.0080
                          0.8000	1.0060
                          0.9000	1.0030
                          1.0000	1.0020
                          1.1000	1.0000
                      </tableData>
                  </table>
            </product>
        </function>

  <axis name="LIFT">

    <function name="aero/force/Lift_alpha">
      <description>Lift_due_to_alpha</description>
      <product>
          <value>0.6</value>
          <property>aero/qbar-psf</property>
          <property>metrics/Sw-sqft</property>
          <property>aero/function/kCLge</property>
          <table>
            <independentVar lookup="row">aero/alpha-rad</independentVar>
      <tableData>
       -3.14 -0.300
       -2.60 -0.800
       -2.08 -0.800
       -1.57 0.000
       -1.00 -2.000
       -0.20 -1.280
       0.00 0.078
       0.09 0.581
       0.17 1.013
       0.26 1.279
       0.45 1.5
       0.65 1.5
       1.20 0.200
       1.57 0.000
       2.08 0.800
       2.60 0.800
       3.14 -0.300
      </tableData>
          </table>

	            <table> <!-- compressibility effect -->
            <independentVar lookup="row">velocities/mach</independentVar>
            <tableData>
0	1
0.1	1.01
0.2	1.02
0.3	1.05
0.4	1.09
0.5	1.15
0.6	1.25
0.7	1.4
1	1.4
1.23	1.4
1.3	1.2
1.4	1.02
1.5	0.89
1.6	0.8
1.7	0.73
1.8	0.67
1.9	0.62
2	0.58
3	0.35
4	0.26
5	0.2
            </tableData>
          </table>

	  <table> <!-- Lift due to wave ride -->
                          <independentVar lookup="row">fcs/wing-fold-pos-norm</independentVar>
                          <independentVar lookup="column">velocities/mach</independentVar>
                          <tableData>
					0.0000	1.0000	2.0000	3.0000
			    0.0  	1.0000	1.0000	1.0000	1.0000
			    1.0  	1.0000	1.0500	1.1000	1.3000
                          </tableData>
         </table>

      </product>
    </function>

    <function name="aero/force/Lift_flap">
       <description>Delta Lift due to flaps</description>
       <product>
           <property>aero/qbar-psf</property>
           <property>metrics/Sw-sqft</property>
           <property>fcs/flap-pos-deg</property>
           <value> 0.00167 </value>
       </product>
    </function>

    <function name="aero/force/Lift_speedbrake">
       <description>Delta Lift due to speedbrake</description>
       <product>
           <property>aero/qbar-psf</property>
           <property>metrics/Sw-sqft</property>
           <property>fcs/speedbrake-pos-norm</property>
           <value>0</value>
       </product>
    </function>

    <function name="aero/force/Lift_elevator">
       <description>Lift due to Elevator Deflection</description>
       <product>
           <property>aero/qbar-psf</property>
           <property>metrics/Sw-sqft</property>
           <property>fcs/elevator-pos-rad</property>
	   <table>
                          <independentVar lookup="row">fcs/wing-fold-pos-norm</independentVar>
                          <tableData>
			  0.00 1.00
			  0.01 0.67
			  1.00 0.67
                          </tableData>
           </table>
           <value>0.2</value>
       </product>
    </function>

  </axis>

  <axis name="DRAG">

    <function name="aero/force/Drag_basic">
    <description>Drag_at_zero_lift</description>
    <product>
     <value>0.6</value>
     <property>aero/qbar-psf</property>
     <property>metrics/Sw-sqft</property>
     <property>aero/function/kCLge</property>
     <table>
      <independentVar lookup="row">aero/alpha-rad</independentVar>
      <tableData>
       -3.14 0.300
       -1.57 1.500
       -0.26 0.240
       -0.1750 0.1560
       -0.0870 0.0410
       0.0000 0.0210
       0.0870 0.0400
       0.1750 0.0960
       0.2620 0.1820
       0.3490 0.3470
       0.4360 0.5770
       0.5240 0.8260
       0.6110 1.0840
       0.6980 1.3260
       0.7850 1.4780
       1.57 1.500
       3.14 0.300
      </tableData>
     </table>

          <table> <!-- compressibility effect -->
            <independentVar lookup="row">velocities/mach</independentVar>
            <tableData>
0	1
0.1	1.01
0.2	1.02
0.3	1.05
0.4	1.09
0.5	1.15
0.6	1.25
0.7	1.4
1	1.4
1.23	1.4
1.3	1.2
1.4	1.02
1.5	0.89
1.6	0.8
1.7	0.73
1.8	0.67
1.9	0.62
2	0.58
3	0.35
4	0.26
5	0.2
            </tableData>
          </table>

          <table> <!-- wave drag effect -->
            <independentVar lookup="row">velocities/mach</independentVar>
            <tableData>
                0.00      1.000
                0.81      1.000
                1.05      1.18
                1.10      1.11
                1.40      1.05
                2.20      1.03
		3.00      1.02
            </tableData>
          </table>

    </product>
   </function>

    <function name="aero/force/Drag_induced">
       <description>Induced drag</description>
         <product>
           <property>aero/qbar-psf</property>
           <property>metrics/Sw-sqft</property>
           <property>aero/cl-squared</property>
           <property>aero/function/kCDge</property>
           <value>0.12</value>
	   <table>
                          <independentVar lookup="row">fcs/wing-fold-pos-norm</independentVar>
                          <tableData>
			  0.00 1.00
			  0.40 0.85
			  1.00 0.67
                          </tableData>
           </table>
         </product>
    </function>

    <function name="aero/force/Drag_flap">
       <description>Drag due to flaps</description>
         <product>
           <property>aero/qbar-psf</property>
           <property>metrics/Sw-sqft</property>
           <property>fcs/flap-pos-deg</property>
           <value> 0.00050 </value>
         </product>
    </function>

    <function name="aero/force/Drag_gear">
       <description>Drag due to gear</description>
         <product>
           <property>aero/qbar-psf</property>
           <property>metrics/Sw-sqft</property>
           <property>gear/gear-pos-norm</property>
           <value>0.02</value>
         </product>
    </function>

    <function name="aero/force/Drag_speedbrake">
       <description>Drag due to speedbrakes</description>
         <product>
           <property>aero/qbar-psf</property>
           <property>metrics/Sw-sqft</property>
           <property>fcs/speedbrake-pos-norm</property>
           <value>0.050</value>
         </product>
    </function>

    <function name="aero/force/Drag_beta">
       <description>Drag due to sideslip</description>
       <product>
          <property>aero/qbar-psf</property>
          <property>metrics/Sw-sqft</property>
          <table>
            <independentVar lookup="row">aero/beta-rad</independentVar>
            <tableData>
              -1.57       1.230
              -0.26    0.050
               0.00       0.000
               0.26    0.050
               1.57       1.230
            </tableData>
          </table>
       </product>
    </function>

    <function name="aero/force/Drag_elevator">
       <description>Drag due to Elevator Deflection</description>
       <product>
           <property>aero/qbar-psf</property>
           <property>metrics/Sw-sqft</property>
           <abs><property>fcs/elevator-pos-norm</property></abs>
           <value>0.04</value>
	   <table>
                          <independentVar lookup="row">fcs/wing-fold-pos-norm</independentVar>
                          <tableData>
			  0.00 1.00
			  0.01 0.67
			  1.00 0.67
                          </tableData>
           </table>
       </product>
    </function>

  </axis>

  <axis name="SIDE">

    <function name="aero/force/Side_beta">
       <description>Side force due to beta</description>
       <product>
           <property>aero/qbar-psf</property>
           <property>metrics/Sw-sqft</property>
           <property>aero/beta-rad</property>
	   <table>
                          <independentVar lookup="row">fcs/wing-fold-pos-norm</independentVar>
                          <tableData>
			  0 1.00
			  1 1.30
                          </tableData>
           </table>
           <value>-1</value>
       </product>
    </function>

  </axis>

  <axis name="ROLL">

    <function name="aero/moment/Roll_beta">
       <description>Roll moment due to beta</description>
       <product>
           <property>aero/qbar-psf</property>
           <property>metrics/Sw-sqft</property>
           <property>metrics/bw-ft</property>
           <property>aero/beta-rad</property>
	   <table>
                          <independentVar lookup="row">fcs/wing-fold-pos-norm</independentVar>
                          <tableData>
			  0 1.00
			  1 0.20
                          </tableData>
           </table>

           <value>-0.1</value>
       </product>
    </function>

    <function name="aero/moment/Roll_damp">
       <description>Roll moment due to roll rate</description>
       <product>
           <property>aero/qbar-psf</property>
           <property>metrics/Sw-sqft</property>
           <property>metrics/bw-ft</property>
           <property>aero/bi2vel</property>
           <property>velocities/p-aero-rad_sec</property>
           <value>-0.4</value>
       </product>
    </function>

    <function name="aero/moment/Roll_yaw">
       <description>Roll moment due to yaw rate</description>
       <product>
           <property>aero/qbar-psf</property>
           <property>metrics/Sw-sqft</property>
           <property>metrics/bw-ft</property>
           <property>aero/bi2vel</property>
           <property>velocities/r-aero-rad_sec</property>
	   <table>
                          <independentVar lookup="row">fcs/wing-fold-pos-norm</independentVar>
                          <tableData>
			  0 1.00
			  1 0.20
                          </tableData>
           </table>

           <value>0.15</value>
       </product>
    </function>

    <function name="aero/moment/Roll_aileron">
       <description>Roll moment due to aileron</description>
       <product>
          <property>aero/qbar-psf</property>
          <property>metrics/Sw-sqft</property>
          <property>metrics/bw-ft</property>
          <property>fcs/left-aileron-pos-rad</property>
	  <table>
                          <independentVar lookup="row">velocities/mach</independentVar>
                          <independentVar lookup="column">fcs/wing-fold-pos-norm</independentVar>
                          <tableData>
					0.0000	0.0100	1.0000
			    0.0  	0.1200	0.0800	0.0800
			    2.0  	0.0400	0.0267	0.0267
                          </tableData>
         </table>
       </product>
    </function>

    <function name="aero/moment/Roll_rudder">
       <description>Roll moment due to rudder</description>
       <product>
           <property>aero/qbar-psf</property>
           <property>metrics/Sw-sqft</property>
           <property>metrics/bw-ft</property>
           <property>fcs/rudder-pos-rad</property>
           <value>0.01</value>
       </product>
    </function>

  </axis>

  <axis name="PITCH">

    <function name="aero/moment/Pitch_alpha">
       <description>Pitch moment due to alpha</description>
       <product>
           <property>aero/qbar-psf</property>
           <property>metrics/Sw-sqft</property>
           <property>metrics/cbarw-ft</property>
           <property>aero/alpha-rad</property>
          <table>
            <independentVar lookup="row">velocities/mach</independentVar>
            <independentVar lookup="column">fcs/wing-fold-pos-norm</independentVar>
            <tableData>
			0.0  0.4 1.0
                0.0    	0.5  0.4 0.2
                3.0    	1.0  0.8 0.4
            </tableData>
          </table>
           <value>-0.3</value>
       </product>
    </function>

    <function name="aero/moment/Pitch_elevator">
       <description>Pitch moment due to elevator</description>
       <product>
          <property>aero/qbar-psf</property>
          <property>metrics/Sw-sqft</property>
          <property>metrics/cbarw-ft</property>
          <property>fcs/elevator-pos-rad</property>
	  <table>
                          <independentVar lookup="row">velocities/mach</independentVar>
                          <independentVar lookup="column">fcs/wing-fold-pos-norm</independentVar>
                          <tableData>
					0.0000	0.0100	1.0000
			    0.0  	-0.800	-0.533	-0.533
			    2.0  	-0.200	-0.133	-0.133
                          </tableData>
         </table>
       </product>
    </function>

    <function name="aero/moment/Pitch_flap">
       <description>Pitch moment due to flaps</description>
       <product>
          <property>aero/qbar-psf</property>
          <property>metrics/Sw-sqft</property>
          <property>metrics/cbarw-ft</property>
          <property>fcs/flap-pos-deg</property>
          <table>
            <independentVar lookup="row">velocities/mach</independentVar>
            <tableData>
              0.0     0.0030
              2.0     0.0015
            </tableData>
          </table>
       </product>
    </function>

    <function name="aero/moment/Pitch_damp">
       <description>Pitch moment due to pitch rate</description>
       <product>
           <property>aero/qbar-psf</property>
           <property>metrics/Sw-sqft</property>
           <property>metrics/cbarw-ft</property>
           <property>aero/ci2vel</property>
           <property>velocities/q-aero-rad_sec</property>
           <value>-18</value>
       </product>
    </function>

    <function name="aero/moment/Pitch_alphadot">
       <description>Pitch moment due to alpha rate</description>
       <product>
           <property>aero/qbar-psf</property>
           <property>metrics/Sw-sqft</property>
           <property>metrics/cbarw-ft</property>
           <property>aero/ci2vel</property>
           <property>aero/alphadot-rad_sec</property>
           <value>-9</value>
       </product>
    </function>

  </axis>

  <axis name="YAW">

    <function name="aero/moment/Yaw_beta">
       <description>Yaw moment due to beta</description>
       <product>
           <property>aero/qbar-psf</property>
           <property>metrics/Sw-sqft</property>
           <property>metrics/bw-ft</property>
           <property>aero/beta-rad</property>
	   <table>
                          <independentVar lookup="row">fcs/wing-fold-pos-norm</independentVar>
                          <tableData>
			  0 1.00
			  1 0.20
                          </tableData>
           </table>

           <value>0.12</value>
       </product>
    </function>

    <function name="aero/moment/Yaw_damp">
       <description>Yaw moment due to yaw rate</description>
       <product>
           <property>aero/qbar-psf</property>
           <property>metrics/Sw-sqft</property>
           <property>metrics/bw-ft</property>
           <property>aero/bi2vel</property>
           <property>velocities/r-aero-rad_sec</property>
           <value>-0.15</value>
       </product>
    </function>

    <function name="aero/moment/Yaw_rudder">
       <description>Yaw moment due to rudder</description>
       <product>
           <property>aero/qbar-psf</property>
           <property>metrics/Sw-sqft</property>
           <property>metrics/bw-ft</property>
           <property>fcs/rudder-pos-rad</property>
           <value>-0.1</value>
       </product>
    </function>

    <function name="aero/moment/Yaw_aileron">
       <description>Adverse yaw</description>
       <product>
           <property>aero/qbar-psf</property>
           <property>metrics/Sw-sqft</property>
           <property>metrics/bw-ft</property>
           <property>fcs/left-aileron-pos-rad</property>
           <value>0</value>
       </product>
    </function>

  </axis>

 </aerodynamics>

</fdm_config>
